# [reference: расчет_3хода.mcdx]
# присваиваем значения температуры дымовых газов локальным переменным
dg1 := tg1
dg2 := tg2
B_топлива = 0.181462
η_бр = 91.4998
# [reference: расчет_3хода.mcdx]
# присваиваем значения температуры дымовых газов локальным переменным
dg3 := tg1
dg4 := tg2  # tx1  # tx2  # tx3
B_топлива = 0.225722
η_бр = 73.9506
# [plot: dg1, dg3 vs tx1]
dg1 = [1864.32; 1253.39; 1212.48; 1171.56; 440.52; 177.608]
# [plot: dg2, dg4 vs tx2]
dg3 = [1282.84; 1097.11; 1079.02; 1060.93; 640.018; 336.914]
dg2 = [1864.32; 1253.39; 1171.56; 440.52; 177.608]
# [plot: dg2, dg4 vs tx3]
dg4 = [1282.84; 1097.11; 1060.93; 640.018; 336.914]
