G_воды := 107.5/3.6 = 29.8611  # Расход сетевой воды
t_1 := 115
t_2 := 70  # Температура сетевой воды на входе и выходе  из котлоагрегата
# Топочная камера
D_жт := 1.188
L_жт := 4.265
F_ст.т := π*D_жт*L_жт + 2*π*D_жт^2/4 = 18.1348  # Площадь стен топочной камеры
F_л.т := π*D_жт*L_жт = 15.9179  # Площадь лучевоспринимающей поверхности топки
V_т := π*D_жт^2/4*L_жт = 4.72761  # Объем топочной камеры
F_жс := 2*π*D_жт^2/4 = 2.21693  # Площадь сечения для прохода дымовых газов
χ_т := F_л.т/F_ст.т = 0.877753  # Степень экранирования топочной камеры
s_т := 3.6*V_т/F_ст.т = 0.938493  # Эффективная толщина излучаемого слоя поворотной камеры
p_т := 0.1  # Давление в топочной камере, МПа
# Поворотная камера
D_п := 1.79  # Диаметр поворотной камеры (м)
D_вк := 0.8  # Диаметр взрывного клапана (м)
L_п := 0.43  # Длина поворотной камеры (м)
L_вк := 0.4  # Длина патрубка взрывного клапана (м)
V_п := (π*D_п^2*L_п + π*D_вк^2*L_вк)/4 = 1.28315  # Объем поворотной камеры (м3)
# Площадь стен поворотной камеры
F_ст.п := π*D_п^2/4 + π*D_п*L_п + π*(D_п^2 - D_вк^2)/4 + π*D_вк*L_вк + π*D_вк^2/4 = 8.45638
# Лучевоспринимающая поверхность поворотной камеры (м2)
F_л.п := π*(D_п^2 - D_жт^2)/4 + π*D_п*L_п + π*(D_п^2 - D_вк^2)/4 + π*D_вк*L_вк = 6.84526
s_п := 3.6*V_п/F_ст.п = 0.546257  # Эффективная толщина излучаемого слоя поворотной камеры
# Значения принимаемые по рисунку 2, по температуре газов и стенки
C_г_пк := 0.9
α_н.пк := 150  # коэффициент теплопередачи излучением Вт/м2К
# Дымогарные трубы второго хода дымовых газов
d_2x := 0.069  # Диаметр трубок второго хода дымовых газов (м)
L_2x := 4.186  # Длина трубок второго хода дымовых газов (м)
n_2x := 86  # Число трубок второго хода дымовых газов
F_л.2x := π*d_2x*L_2x*n_2x = 78.0363  # Площадь лучевоспринимающей поверхности трубок второго хода дымовых газов (м2)
F_жс_2x := π*d_2x^2*n_2x/4 = 0.321578  # Площадь сечения трубок второго хода дымовых газов
s_2x := 0.9*d_2x = 0.0621  # Эффективная толщина излучающего слоя второго хода дымовых газов
# Значения принимаемые по рисунку 2, по температуре газов и стенки
C_г_2x := 0.98
α_н.2x := 85  # коэффициент теплопередачи излучением Вт/м2К
# Дымогарные трубы второго хода дымовых газов
d_3x := 0.05  # Диаметр трубок третьего хода дымовых газов (м)
L_3x := 4.698  # Длина трубок третьего хода дымовых газов (м)
n_3x := 86  # Число трубок третьего хода дымовых газов
F_л.3x := π*d_3x*L_3x*n_3x = 63.4646  # Площадь лучевоспринимающей поверхности трубок третьего хода дымовых газов (м2)
F_жс_3x := π*d_3x^2*n_3x/4 = 0.168861  # Площадь сечения трубок третьего хода дымовых газов
s_3x := 0.9*d_3x = 0.045  # Эффективная толщина излучающего слоя третьего хода дымовых газов
# Значения принимаемые по рисунку 2, по температуре газов и стенки
C_г_3x := 0.98
α_н.3x := 85  # коэффициент теплопередачи излучением Вт/м2К
