# Состав мазутного топлива по паспорту
# Рабочая масса топлива | Пересчет на сухую массу топлива | Пересчет на горючую массу топлива
W_p := 3
x_c := 100/(100 - W_p) = 1.03093
A_p := 0.1
x_г := 100/(100 - W_p - A_p) = 1.03199
S_opk := 1.4
S_ock := S_opk*x_c = 1.4433
S_ock := S_opk*x_г = 1.44479
C_p := 83.8
C_c := C_p*x_c = 86.3918
C_c := C_p*x_г = 86.4809
H_p := 11.2
H_c := H_p*x_c = 11.5464
H_c := H_p*x_г = 11.5583
N_p := 0.25
N_c := N_p*x_c = 0.257732
N_c := N_p*x_г = 0.257998
O_p := 0.25
O_c := O_p*x_c = 0.257732
O_c := O_p*x_г = 0.257998
Q_н := 33.73*10^3
t_тл := 90  # температура мазута
c_тлм := 1.74 + 0.0025*t_тл = 1.965  # теплоемкость мазута
i_тл := c_тлм*t_тл = 176.85  # тепло вносимое в топку с топливом
α_в := 1.1  # Коэффициент избытка воздуха
