# [reference: мазут.mcdx]
# Теоретический объем воздуха необходимый для полного сжигания 1кг мазута
V_0 := 0.0889*(C_p + 0.375*S_opk) + 0.265*H_p - 0.0333*O_p = 10.4562
# Теоретический объем азота в продуктах сгорания при сжигании 1кг мазута
V_0N2 := 0.79*V_0 + 0.8*N_p/100 = 8.26237
# Объем трехатомных газов при сжигании 1кг мазута
V_RO2 := 1.866*(C_p + 0.375*S_opk)/100 = 1.5735
# Теоретический объем водяных паров при сжигании 1кг мазута
V_0H2O := 0.111*H_p + 0.0124*W_p + 0.0161*V_0 = 1.44874
# Избыточное количество воздуха при сжигании 1кг мазута
V_изб.в := V_0*(α_в - 1) = 1.04562
# Действительный объем водяных паров при сжигании 1кг мазута
V_H2O := V_0H2O + 0.0161*(α_в - 1)*V_0 = 1.46558
# Действительный объем продуктов сгорания при сжигании 1кг мазута
V_г := V_H2O + V_0N2 + V_RO2 + V_изб.в = 12.3471
# Объемная доля водяных паров продуктов сгорания
r_H2O := V_H2O/V_г = 0.118698
# Объемная доля трехатомных газов в продуктах сгорания
r_RO2 := V_RO2/V_г = 0.127439
# Суммарная доля водяных паров и трехатомных газов
r_п := r_H2O + r_RO2 = 0.246138
