# [reference: функции_2хода.mcdx]
# Расчет дымогарных труб второго хода дымовых газов
t``_2х := 500  # Задаемся температурой дымовых газов на выходе из дымогарных труб 2го хода
t_yx = 336.915
solve block
    # guess values
    a := t``_пк
    b := t``_2х
    x(a, b) := fQ_2х_тмо(a, b)
    y(a, b) := fQ_2х_б(a, b)
    # constraints
    a == t``_пк
    x(a, b) - y(a, b) == 0
    # solver
    sol4 := find(a, b) = [1060.93; 640.018]
    x(a, b) - y(a, b) = -5082.54
end solve block
# Температура на входе во 2йход ДГ
t``_пк = 1060.93
I`_2х := I``_пк = 27469.2
# Температура на выходе из 2го хода ДГ полученная решением системы уравнений
t``_2х := sol4[1] = 640.018
I``_2х := I_г(t``_2х) = 15795.5
# Рассчитаем среднюю температуру дымовых газов
t_2х_ср := (t``_пк + t``_2х)/2 = 850.474
T_2х_ср := t_2х_ср + 273.15 = 1123.62
# Рассчитаем температурный напор в дымогарных трубах 2го хода дымовых газов
Δt_2х_б := t``_пк - t_2 = 990.929
Δt_2х_м := t``_2х - t_1 = 525.018
Δt_2x := (Δt_2х_б - Δt_2х_м)/ln(Δt_2х_б/Δt_2х_м) = 733.475
ω_2x := B_топлива*V_г*T_2х_ср/(F_жс_2x*273) = 35.6706
# Рассчитаем скорость в жаровой трубе
# Определим параметры дымовых газов при средней температуре дымовых газов
v_2х_дг := v_дг(t_2х_ср) = 0.000135357
λ_2х_дг := λ_дг(t_2х_ср) = 0.09405
Pr_2х_дг := Pr_дг(t_2х_ср) = 0.544885
# Рассчитаем коэффициент теплоотдачи конвекцией во 2м ходу дымовых газов
α_тк_2х := 0.023*λ_2х_дг/d_2x*(ω_2x*d_2x/v_2х_дг)^0.8*Pr_2х_дг^0.4 = 62.8784
# Рассчитаем коэффициент ослабления лучей газовой средой
k_г_2х := ((7.8 + 16*r_H2O)/sqrt(10*p_т*r_п*s_2x) - 1)*(1 - 0.37*10^-3*(t``_2х + 273.15)) = 51.2826
a_г_2х := 1 - e^(-k_г_2х*r_п*p_т*s_2x) = 0.0753928  # Рассчитаем степень черноты газовой части факела
α_л_2х := a_г_2х*α_н.2x*C_г_2x = 6.28022  # Рассчитаем коэффициент теплоотдачи излучением, Вт/(м2К)
ψ_2х := 0.65  # Значение коэффициента тепловой эффективности
K_2x := ψ_2х*(α_тк_2х + α_л_2х) = 44.9531  # Рассчитаем коэффициент теплопередачи
Q_2х_тмо := K_2x*Δt_2x*F_л.2x/(B_топлива*10^3) = 11399  # Рассчитаем тепло воспринятое трубами 2го хода
Q_2х_б := φ_т*(I`_2х - I``_2х) = 11399  # Расчет уравнения баланса тепла, кДж/м3
Q_2х_тмо - Q_2х_б = -1.81899e-12  # Невязка теплового баланса
