# [reference: функции_3хода.mcdx]
# Расчет дымогарных труб третьего хода дымовых газов
t``_3х := 180  # Задаемся температурой дымовых газов на выходе из дымогарных труб 3го хода
t_yx = 336.915
solve block
    # guess values
    a := t``_2х
    b := t``_3х
    x(a, b) := fQ_3х_тмо(a, b)
    y(a, b) := fQ_3х_б(a, b)
    # constraints
    a == t``_2х
    x(a, b) - y(a, b) == 0
    # solver
    sol4 := find(a, b) = [640.018; 336.914]
    x(a, b) - y(a, b) = -6642.54
end solve block
# Температура на входе во 3йход ДГ
t``_2х = 640.018
I`_3х := I``_2х = 15795.5
# Температура на выходе из 3го хода ДГ полученная решением системы уравнений
t``_3х := sol4[1] = 336.914
I``_3х := I_г(t``_3х) = 8009.42
# Рассчитаем среднюю температуру дымовых газов
t_3х_ср := (t``_2х + t``_3х)/2 = 488.466
T_3х_ср := t_3х_ср + 273.15 = 761.616
# Рассчитаем температурный напор в дымогарных трубах 3го хода дымовых газов
Δt_3х_б := t``_2х - t_2 = 570.018
Δt_3х_м := t``_3х - t_1 = 221.914
Δt_3x := (Δt_3х_б - Δt_3х_м)/ln(Δt_3х_б/Δt_3х_м) = 368.998
ω_3x := B_топлива*V_г*T_3х_ср/(F_жс_3x*273) = 46.0451
# Рассчитаем скорость в жаровой трубе
# Определим параметры дымовых газов при средней температуре дымовых газов
v_3х_дг := v_дг(t_3х_ср) = 7.23343e-5
λ_3х_дг := λ_дг(t_3х_ср) = 0.0667872
Pr_3х_дг := Pr_дг(t_3х_ср) = 0.698066
# Рассчитаем коэффициент теплоотдачи конвекцией во 3м ходу дымовых газов
α_тк_3х := 0.023*λ_3х_дг/d_3x*(ω_3x*d_3x/v_3х_дг)^0.8*Pr_3х_дг^0.4 = 106.477
# Рассчитаем коэффициент ослабления лучей газовой средой
k_г_3х := ((7.8 + 16*r_H2O)/sqrt(10*p_т*r_п*s_3x) - 1)*(1 - 0.37*10^-3*(t``_3х + 273.15)) = 70.5825
a_г_3х := 1 - e^(-k_г_3х*r_п*p_т*s_3x) = 0.0752008  # Рассчитаем степень черноты газовой части факела
α_л_3х := a_г_3х*α_н.3x*C_г_3x = 6.26423  # Рассчитаем коэффициент теплоотдачи излучением, Вт/(м2К)
ψ_3х := 0.65  # Значение коэффициента тепловой эффективности
K_3x := ψ_3х*(α_тк_3х + α_л_3х) = 73.282  # Рассчитаем коэффициент теплопередачи
Q_3х_тмо := K_3x*Δt_3x*F_л.3x/(B_топлива*10^3) = 7602.88  # Рассчитаем тепло воспринятое трубами 3го хода
Q_3х_б := φ_т*(I`_3х - I``_3х) = 7602.88  # Расчет уравнения баланса тепла, кДж/м3
Q_3х_тмо - Q_3х_б = -1.81899e-12  # Невязка теплового баланса
L_жт = 4.265
L_п = 0.43
L_2x = 4.186
L_3x = 4.698
L_1 := L_жт + L_п
L_2 := L_1 - L_п
L_3 := L_2 - L_2x
L_4 := L_3 + L_3x
t_пк.ср = 1079.02
t_a = 1282.84
t``_т = 1097.11
t``_пк = 1060.93
t``_2х = 640.018
t``_3х = 336.914
K_1 := L_жт + L_п
K_2 := K_1 + L_2x
K_3 := K_2 + L_3x
tx1 := transpose([0, L_жт, L_1, L_2, L_3, L_4])
tg1 := transpose([t_a, t``_т, t_пк.ср, t``_пк, t``_2х, t``_3х])
tx2 := transpose([0, L_жт, K_1, K_2, K_3])
tg2 := transpose([t_a, t``_т, t``_пк, t``_2х, t``_3х])
tx3 := transpose([0, 1, 2, 3, 4])
# [plot: tg1 vs tx1]
# [plot: tg2 vs tx2]
# [plot: tg2 vs tx3]
