# [reference: расчет_энтальпий.mcdx]
# [reference: котлоагрегат.mcdx]
t_yx := 336.915  # Задаемся температурой уходящих газов
t_в := 20  # Задаемся температурой холодного воздуха подаваемого в котельный агрегат
# Рассчитываем энтальпию уходящих газов и воздуха
I_yx := I_г(t_yx) = 8009.43
I_хв := I_v(t_в) = 29.5318
q_2 := (I_yx - α_в*I_хв)*100/Q_н = 23.6494  # Рассчитаем потери теплоты с уходящими газами
q_3 := 0.7  # Принимаем потери с химическим недожогом равным нулю
q_5 := 1.7  # Принимаем потери тепла от наружного охлаждения (через изоляцию)
η_бр := 100 - q_2 - q_3 - q_5 = 73.9506  # Рассчитаем КПД котлоагрегата брутто
φ_т := 1 - q_5/(η_бр - q_5) = 0.976471  # Рассчитаем коэффициент сохранения тепла
B_топлива := G_воды*4.19*(t_1 - t_2)/(Q_н*η_бр/100) = 0.225722  # Рассчитаем расход топлива в секунду (кг/с)
