# [reference: функции_топки_от_температуры.mcdx]
Q_в := V_0*I_хв*α_в = 339.669  # Рассчитаем тепло вносимое с воздухом
# Рассчитаем тепловыделения в топочной камере котлоагрегата
Q_т := Q_н*(100 - q_3)/100 + Q_в = 33833.6
t_a := 1800  # Задаемся адиабатной температурой
# Подбираем адиабатную темперу так, чтобы разница между энтальпией адиабатной температуры и тепловыделением в топочной камере котлоагрегата было близко к нулю
solve block
    # guess values
    x := Q_т
    z := 1800
    y(z) := I_г(z)
    # constraints
    x == Q_т
    x - y(z) == 0
    # solver
    sol := find(x, z) = [33833.6; 1282.84]
    x - y(z) = -15469.5
end solve block
t_a := sol[1] = 1282.84
I_a := I_г(t_a) = 33833.6
Q_т = 33833.6
ΔQ_a := Q_т - I_a = 0
t_yx = 336.915
B_топлива = 0.225722
φ_т = 0.976471
t``_т := 1200  # Задаемся температурой на выходе из топочной камеры
# Подбираем темперу из котлоагрегата так, чтобы разница между теплом воспринятым жаровой трубой и теплом переданным в жаровой трубе было близко к нулю
solve block
    # guess values
    a := t_a
    b := t``_т
    x(a, b) := fQ_т_б(a, b)
    y(a, b) := fQ_т_тмо(a, b)
    # constraints
    a == t_a
    x(a, b) - y(a, b) == 0
    # solver
    sol2 := find(a, b) = [1282.84; 1097.11]
end solve block
t``_т := sol2[1] = 1097.11
I``_т := I_г(t``_т) = 28507.2
# Тепло переданное дымовыми газами, по уравнения баланса кДж/м3
Q_т_б := φ_т*(I_a - I``_т) = 5201.02
# Рассчитаем эффективную температуру топочной среды, К
T_ф := 0.925*sqrt((t_a + 273.15)*(t``_т + 273.15)) = 1350.66
Т_з := (t_1 + t_2)/2 + 273.15 = 365.65
ω_т := B_топлива*V_г*T_ф/(F_жс*273) = 6.2197  # Рассчитаем скорость в жаровой трубе м/с
# Параметры дымовых газов
t_ф := T_ф - 273.15 = 1077.51
v_т_дг := v_дг(t_ф) = 0.000182728
λ_т_дг := λ_дг(t_ф) = 0.113916
Pr_т_дг := Pr_дг(t_ф) = 0.528939
α_тк := 0.023*λ_т_дг/D_жт*(ω_т*D_жт/v_т_дг)^0.8*Pr_т_дг^0.4 = 8.28482  # Коэффициент теплоотдачи конвекцией в топке, Вт/(м2*К)
Q_т_к := α_тк/1000*F_л.т*(T_ф - Т_з)/B_топлива = 575.486  # Тепло переданное в жаровой трубе конвекцией
T``_т := t``_т + 273.15 = 1370.26
# Рассчитаем коэффициент ослабления  лучей сажистыми частицами в топочной камере
k_c := 1.2/(1 + α_в^2)*(C_p/H_p)^0.4*(1.6*10^-3*T``_т - 0.5) = 2.05544
k_г := ((7.8 + 16*r_H2O)/sqrt(10*p_т*r_п*s_т) - 1)*(1 - 0.37*10^-3*T``_т) = 9.45603  # Коэффициент ослабления лучей газовой средой
k_св := k_г*r_п + k_c = 4.38293  # Коэффициент ослабления лучей светящейся частью факела
a_св := 1 - e^(-k_св*p_т*s_т) = 0.337235  # Рассчитаем степень черноты светящейся части факела
a_г := 1 - e^(-k_г*r_п*p_т*s_т) = 0.196223  # Рассчитаем степень черноты газовой части факела
q_v := B_топлива*Q_н/V_т = 1610.46  # Видимое тепловое напряжение топочного объема, кВт/м3
m_т :=
    if q_v ≤ 400
        m_т ← 0.55
    else if q_v ≥ 1000
        m_т ← 1
    else
        my[0] ← 0.55
        my[1] ← 1
        mx[0] ← 400
        mx[1] ← 1000
        m_т ← linterp(mx, my, q_v)
    = 1  # Коэффициент заполнения топки светящейся частью факела
a_ф := m_т*a_св + a_г*(1 - m_т) = 0.337235  # Рассчитаем эффективную степень черноты факела
a_л := 0.88  # Эффективная поглощательная способность жаровой трубы, принимается, как для стальной трубы, 0,88
a_т := 1/(1/a_л + χ_т*(1/a_ф - 1)) = 0.349479  # Рассчитаем приведенную степень черноты топочной камеры
σ_0 := 5.67*10^-11  # Коэффициент излучения абсолютно черного тела
# Рассчитаем тепло переданное в жаровой трубе излучением кДж/м3
Q_т.л := σ_0*a_т*F_л.т/B_топлива*(T_ф^4 - Т_з^4) = 4625.54
# Рассчитаем тепло воспринятое жаровой трубой по уравнениям теплообмена кДж/м3
Q_т.тмо := Q_т.л + Q_т_к = 5201.02
Q_т_б - Q_т.тмо = 1.81899e-12  # Невязка теплового баланса
t``_т = 1097.11  # Температура на выходе из жаровой трубы
t_a = 1282.84  # Адиабатная температура жаровой трубы
