# [reference: объемы_дымовых_газов.mcdx]
# [Excel component]
    t_x := excel["A2:A26"]
    Cv_N2 := excel["C2:C26"]
    Cv_RO2 := excel["B2:B26"]
    Cv_H2O := excel["D2:D26"]
    Cv_v := excel["E2:E26"]
I_RO2(temp) := interp(loess(t_x, Cv_RO2, 0.3), t_x, Cv_RO2, temp)  # Энтальпия трехатомных газов
I_N2(temp) := interp(loess(t_x, Cv_N2, 0.3), t_x, Cv_N2, temp)  # Энтальпия азота
I_H2O(temp) := interp(loess(t_x, Cv_H2O, 0.3), t_x, Cv_H2O, temp)  # Энтальпия водных паров
I_v(temp) := interp(regress(t_x, Cv_v, 5), t_x, Cv_v, temp)  # Энтальпия воздуха
I_0г(t_газов) := V_RO2*(I_RO2(t_газов) + V_0H2O*I_H2O(t_газов) + V_0N2*I_N2(t_газов))
I_г(t_газов) := I_0г(t_газов) + I_v(t_газов)*(α_в - 1)  # Энтальпия дымовых газов
