# [reference: природный_газ.mcdx]
# Теоретический объем воздуха необходимый для полного сжигания 1м3 природного газа
V_0 := 0.0476*(0.5*CO + 0.5*H_2 + 1.5*H_2S + CH_4*(1 + 4/4) + C_2H_6*(2 + 6/4) + C_3H_8*(3 + 8/4) + C_4H_10*(4 + 10/4) + C_5H_12*(5 + 12/4) + C_6H_14*(6 + 12/4)) = 9.64569
# Теоретический объем азота в продуктах сгорания при сжигании 1м3 природного газа
V_0N2 := 0.79*V_0 + N_2/100 = 7.632
# Объем трехатомных газов при сжигании 1м3 природного газа
V_RO2 := 0.01*(CO_2 + CO + H_2S + CH_4*1 + C_2H_6*2 + C_3H_8*3 + C_4H_10*4 + C_5H_12*5 + C_6H_14*6) = 1.02471
# Теоретический объем водяных паров при сжигании 1м3 газа
V_0H2O := 0.01*(H_2S + H_2 + CH_4*4/2 + C_2H_6*6/2 + C_3H_8*8/2 + C_4H_10*10/2 + C_5H_12*12/2 + C_6H_14*14/2 + 0.124*d_г.тл) + 0.0161*V_0 = 2.16342
# Избыточное количество воздуха при сжигании 1м3 природного газа
V_изб.в := V_0*(α_в - 1) = 0.482285
# Действительный объем водяных паров при сжигании 1м3 природного газа
V_H2O := V_0H2O + 0.0161*(α_в - 1)*V_0 = 2.17119
# Действительный объем продуктов сгорания при сжигании 1м3 природного газа
V_г := V_H2O + V_0N2 + V_RO2 + V_изб.в = 11.3102
# Объемная доля водяных паров продуктов сгорания
r_H2O := V_H2O/V_г = 0.191967
# Объемная доля трехатомных газов в продуктах сгорания
r_RO2 := V_RO2/V_г = 0.0906006
# Суммарная доля водяных паров и трехатомных газов
r_п := r_H2O + r_RO2 = 0.282568
