# [reference: функции_3хода.mcdx]
# Расчет дымогарных труб третьего хода дымовых газов
t``_3х := 180  # Задаемся температурой дымовых газов на выходе из дымогарных труб 3го хода
# Температура на входе во 3йход ДГ
solve block
    # guess values
    a := t``_2х
    b := t``_3х
    x(a, b) := fQ_3х_тмо(a, b)
    y(a, b) := fQ_3х_б(a, b)
    # constraints
    a == t``_2х
    x(a, b) - y(a, b) == 0
    # solver
    sol4 := find(a, b) = [440.52; 177.608]
    x(a, b) - y(a, b) = 100.165
end solve block
t``_2х = 440.52
I`_3х := I``_2х = 7027.16
# Температура на выходе из 3го хода ДГ полученная решением системы уравнений
t``_3х := sol4[1] = 177.608
I``_3х := I_г(t``_3х) = 2743.88
# Рассчитаем среднюю температуру дымовых газов
t_3х_ср := (t``_2х + t``_3х)/2 = 309.064
T_3х_ср := t_3х_ср + 273.15 = 582.214
# Рассчитаем температурный напор в дымогарных трубах 3го хода дымовых газов
Δt_3х_б := t``_2х - t_2 = 370.52
Δt_3х_м := t``_3х - t_1 = 62.6084
Δt_3x := (Δt_3х_б - Δt_3х_м)/ln(Δt_3х_б/Δt_3х_м) = 173.178
ω_3x := B_топлива*V_г*T_3х_ср/(F_жс_3x*273) = 25.9206
# Рассчитаем скорость в жаровой трубе
# Определим параметры дымовых газов при средней температуре дымовых газов
v_3х_дг := v_дг(t_3х_ср) = 4.60521e-5
λ_3х_дг := λ_дг(t_3х_ср) = 0.0512219
Pr_3х_дг := Pr_дг(t_3х_ср) = 0.715347
# Рассчитаем коэффициент теплоотдачи конвекцией во 3м ходу дымовых газов
α_тк_3х := 0.023*λ_3х_дг/d_3x*(ω_3x*d_3x/v_3х_дг)^0.8*Pr_3х_дг^0.4 = 74.7332
# Рассчитаем коэффициент ослабления лучей газовой средой
k_г_3х := ((7.8 + 16*r_H2O)/sqrt(10*p_т*r_п*s_3x) - 1)*(1 - 0.37*10^-3*(t``_3х + 273.15)) = 79.4972
a_г_3х := 1 - e^(-k_г_3х*r_п*p_т*s_3x) = 0.096144  # Рассчитаем степень черноты газовой части факела
α_л_3х := a_г_3х*α_н.3x*C_г_3x = 8.00879  # Рассчитаем коэффициент теплоотдачи излучением, Вт/(м2К)
ψ_3х := 0.85  # Значение коэффициента тепловой эффективности
K_3x := ψ_3х*(α_тк_3х + α_л_3х) = 70.3307  # Рассчитаем коэффициент теплопередачи
Q_3х_тмо := K_3x*Δt_3x*F_л.3x/(B_топлива*10^3) = 4259.75  # Рассчитаем тепло воспринятое трубами 3го хода
Q_3х_б := φ_т*(I`_3х - I``_3х) = 4259.75  # Расчет уравнения баланса тепла, кДж/м3
Q_3х_тмо - Q_3х_б = 0  # Невязка теплового баланса
L_жт = 4.265
L_п = 0.43
L_2x = 4.186
L_3x = 4.698
L_1 := L_жт + L_п
L_2 := L_1 - L_п
L_3 := L_2 - L_2x
L_4 := L_3 + L_3x
t_пк.ср = 1212.48
t_a = 1864.32
t``_т = 1253.39
t``_пк = 1171.56
t``_2х = 440.52
t``_3х = 177.608
K_1 := L_жт + L_п
K_2 := K_1 + L_2x
K_3 := K_2 + L_3x
tx1 := transpose([0, L_жт, L_1, L_2, L_3, L_4])
tg1 := transpose([t_a, t``_т, t_пк.ср, t``_пк, t``_2х, t``_3х])
tx2 := transpose([0, L_жт, K_1, K_2, K_3])
tg2 := transpose([t_a, t``_т, t``_пк, t``_2х, t``_3х])
tx3 := transpose([0, 1, 2, 3, 4])
# [plot: tg1 vs tx1]
# [plot: tg2 vs tx2]
# [plot: tg2 vs tx3]
