# [reference: расчет_энтальпий.mcdx]
# [reference: котлоагрегат.mcdx]
t_yx := 177.608  # Задаемся температурой уходящих газов
t_в := 20  # Задаемся температурой холодного воздуха подаваемого в котельный агрегат
# Рассчитываем энтальпию уходящих газов и воздуха
I_yx := I_г(t_yx) = 2743.87
I_хв := I_v(t_в) = 29.5318
q_2 := (I_yx - α_в*I_хв)*100/Q_н = 8.00019  # Рассчитаем потери теплоты с уходящими газами
q_3 := 0  # Принимаем потери с химическим недожогом равным нулю
q_5 := 0.5  # Принимаем потери тепла от наружного охлаждения (через изоляцию)
η_бр := 100 - q_2 - q_3 - q_5 = 91.4998  # Рассчитаем КПД котлоагрегата брутто
φ_т := 1 - q_5/(η_бр - q_5) = 0.994505  # Рассчитаем коэффициент сохранения тепла
B_топлива := G_воды*4.19*(t_1 - t_2)/(Q_н*η_бр/100) = 0.181462  # Рассчитаем расход топлива в секунду (м3/с)
