# [reference: функции_ПК_от_температуры.mcdx]
t``_пк := 1000  # Задаемся температурой на выходе из поворотной камеры
# Подбираем темперу из поворотной камеры так, чтобы разница между теплом воспринятым поворотной камерой и теплом переданным в поворотной камерой было близко к нулю
solve block
    # guess values
    a := t``_т
    b := t``_пк
    x(a, b) := fQ_пк_б(a, b)
    y(a, b) := fQ_пк(a, b)
    # constraints
    a == t``_т
    x(a, b) - y(a, b) == 0
    # solver
    sol3 := find(a, b) = [1253.39; 1171.56]
    x(a, b) - y(a, b) = 3223.84
end solve block
# Температуры на выходе из топки и поворотной камеры
t``_т = 1253.39
t``_пк := sol3[1] = 1171.56
# Энтальпии дымовых газов на выходе из топки и поворотной камеры
I``_пк := I_г(t``_пк) = 20372.2
I``_т := I_г(t``_т) = 21945.1
t_пк.ср := (t``_т + t``_пк)/2 = 1212.48  # Средняя температура ДГ в поворотной камере
t_з := (t_1 + t_2)/2 + 25 = 117.5  # Температура загрязненной стенки поворотной камеры
T``_п := t``_пк + 273.15 = 1444.71
# Рассчитаем коэффициент ослабления лучей газовой средой
k_г := ((7.8 + 16*r_H2O)/sqrt(10*p_т*r_п*s_п) - 1)*(1 - 0.37*10^-3*T``_п) = 12.4143
a_г := 1 - e^(-k_г*r_п*p_т*s_т) = 0.28051  # степень черноты среды поворотной камеры
α_л_пк := α_н.пк*a_г*C_г_пк = 37.8688  # Рассчитаем коэффициент теплоотдачи излучением, Вт/(м2К)
Q_п.л := α_л_пк*(t_пк.ср - t_з)*F_л.п/(B_топлива*10^3) = 1564.2  # Рассчитаем тепло переданное излучением в поворотной камере, кДж/м3
Q_пк_б := φ_т*(I``_т - I``_пк) = 1564.2  # Рассчитаем тепло воспринятое в поворотной камере по балансу, кДж/м3
Q_пк_б - Q_п.л = -5.22959e-12  # Рассчитаем невязку теплового баланса
