# Физические характеристики дымовых газов среднего состава
# [Excel component]
    tx_дг := excel["A2:A26"]
    λx_дг := excel["C2:C26"]
    vx_дг := excel["B2:B26"]
    Prx_дг := excel["D2:D26"]
v_дг(temp) := interp(regress(tx_дг, vx_дг, 5), tx_дг, vx_дг, temp)/10^6
λ_дг(temp) := interp(regress(tx_дг, λx_дг, 5), tx_дг, λx_дг, temp)/100
Pr_дг(temp) := interp(regress(tx_дг, Prx_дг, 5), tx_дг, Prx_дг, temp)
