# [reference: объемы_дымовых_газов.mcdx]
# [Excel component]
    t_x := excel["A2:A26"]
    Cv_N2 := excel["C2:C26"]
    Cv_RO2 := excel["B2:B26"]
    Cv_H2O := excel["D2:D26"]
    Cv_v := excel["E2:E26"]
I_RO2(temp) := interp(loess(t_x, Cv_RO2, 0.3), t_x, Cv_RO2, temp)  # Энтальпия трехатомных газов
I_N2(temp) := interp(loess(t_x, Cv_N2, 0.3), t_x, Cv_N2, temp)  # Энтальпия азота
I_H2O(temp) := interp(loess(t_x, Cv_H2O, 0.3), t_x, Cv_H2O, temp)  # Энтальпия водных паров
I_v(temp) := interp(regress(t_x, Cv_v, 5), t_x, Cv_v, temp)  # Энтальпия воздуха
I_0g(temp) := V_RO2*I_RO2(temp) + V_0H2O*I_H2O(temp) + V_0N2*I_N2(temp)
I_g(temp) := I_0g(temp) + I_v(temp)*(α_в - 1)
# Функции нахождения энтальпий полученные с помощью аппроксимации табличных данных через сайт PLANETCALC, где в результате анализа предложенных функций была выбрана функция с наименьшей средней ошибкой аппроксимации
fI_RO2(t_x) := -6.73767778007e-8*t_x^3 + 0.000403940745248*t_x^2 + 1.90412731324*t_x - 36.6196680175
fI_N2(t_x) := -2.06201367004e-8*t_x^3 + 0.000148887875411*t_x^2 + 1.26723174779*t_x + 0.686007699633
fI_H2O(t_x) := -3.98877290093e-8*t_x^3 + 0.000363412384719*t_x^2 + 1.39067570897*t_x + 12.0564426609
fI_v(t_x) := -2.73477247321e-8*t_x^3 + 0.000179312016488*t_x^2 + 1.28308141953*t_x + 2.52673515669
n := 0, 1 .. 24
fI_0g(t_x) := V_RO2*fI_RO2(t_x) + V_0H2O*fI_H2O(t_x) + V_0N2*fI_N2(t_x)
fI_g(t_x) := fI_0g(t_x) + fI_v(t_x)*(α_в - 1)
prog1 :=
    for i ∈ n
        t_x ← (i + 1)*100
        Ig_RO2[i] ← fI_RO2(t_x)
        Ir_RO2[i] ← I_RO2(t_x)
        i ← i + 1
    return [Ig_RO2, Ir_RO2]
prog2 :=
    for i ∈ n
        t_x ← (i + 1)*100
        Ig_N2[i] ← fI_N2(t_x)
        Ir_N2[i] ← I_N2(t_x)
        i ← i + 1
    return [Ig_N2, Ir_N2]
[Ig_RO2, Ir_RO2] := prog1
[Ig_N2, Ir_N2] := prog2
prog3 :=
    for i ∈ n
        t_x ← (i + 1)*100
        Ig_H2O[i] ← fI_H2O(t_x)
        Ir_H2O[i] ← I_H2O(t_x)
        i ← i + 1
    return [Ig_H2O, Ir_H2O]
prog4 :=
    for i ∈ n
        t_x ← (i + 1)*100
        Ig_v[i] ← fI_v(t_x)
        Ir_v[i] ← I_v(t_x)
        i ← i + 1
    return [Ig_v, Ir_v]
[Ig_H2O, Ir_H2O] := prog3
[Ig_v, Ir_v] := prog4
# Рассчитаем разницу между вычисляемыми и действительными значениями в заданных температурах
delta1 :=
    for i ∈ n
        d_Ig_RO2[i] ← 100*(Cv_RO2[i] - Ig_RO2[i])/Cv_RO2[i]
        d_Ir_RO2[i] ← 100*(Cv_RO2[i] - Ir_RO2[i])/Cv_RO2[i]
        i ← i + 1
    return [d_Ig_RO2, d_Ir_RO2]
delta2 :=
    for i ∈ n
        d_Ig_N2[i] ← 100*(Cv_N2[i] - Ig_N2[i])/Cv_N2[i]
        d_Ir_N2[i] ← 100*(Cv_N2[i] - Ir_N2[i])/Cv_N2[i]
        i ← i + 1
    return [d_Ig_N2, d_Ir_N2]
delta3 :=
    for i ∈ n
        d_Ig_H2O[i] ← 100*(Cv_H2O[i] - Ig_H2O[i])/Cv_H2O[i]
        d_Ir_H2O[i] ← 100*(Cv_H2O[i] - Ir_H2O[i])/Cv_H2O[i]
        i ← i + 1
    return [d_Ig_H2O, d_Ir_H2O]
delta4 :=
    for i ∈ n
        d_Ig_v[i] ← 100*(Cv_v[i] - Ig_v[i])/Cv_v[i]
        d_Ir_v[i] ← 100*(Cv_v[i] - Ir_v[i])/Cv_v[i]
        i ← i + 1
    return [d_Ig_v, d_Ir_v]
prog5 :=
    for i ∈ n
        t_x ← (i + 1)*100
        my_fI_g[i] ← fI_g(t_x)
        my_I_g[i] ← I_g(t_x)
        i ← i + 1
    return [my_fI_g, my_I_g]
[d_Ig_RO2, d_Ir_RO2] := delta1
[d_Ig_N2, d_Ir_N2] := delta2
[d_Ig_H2O, d_Ir_H2O] := delta3
[d_Ig_v, d_Ir_v] := delta4
[my_fI_g, my_I_g] := prog5
# Рассчитаем разницу между расчетами энтальпии дымовых газов
delta_I := 100*(my_I_g - my_fI_g)/my_I_g
delta_Ix := my_I_g - my_fI_g
# [plot: d_Ig_RO2(n), d_Ir_RO2(n) vs n]
# [plot: d_Ig_N2(n), d_Ir_N2(n) vs n]
# [plot: d_Ir_H2O(n), d_Ig_H2O(n) vs n]
# [plot: d_Ig_v(n), d_Ir_v(n) vs n]
# [plot: delta_I(n) vs n]
# [plot: delt_Ix(n) vs n]
